<?xml version="1.0"?>
<Node name="root" gravity="0 0 0" dt="1"  >
	<RequiredPlugin pluginName="CGALPlugin"/>
	<RequiredPlugin pluginName="image"/>
    <RequiredPlugin pluginName='SofaOpenglVisual'/>

	<BackgroundSetting color="0 0.16862745098 0.21176470588"/>
	<VisualStyle displayFlags="showVisual" />
	<VisualGrid/>
	<OglSceneFrame/>
	<LineAxis/>

	<ImageContainer name="image" template="ImageUC" filename="data/image/image-cube.inr"/>
	<!-- <ImageViewer template="ImageUC" src="@image"/> -->

	<MeshGenerationFromImage template="Vec3d,ImageUC" name="generator" printLog="0" drawTetras="true"
	image="@image.image" transform="@image.transform"
	cellSize="0.5" facetAngle="30" facetSize="1" cellRatio="3" facetApproximation="1" ordering="0"
	label="1 2 3" labelCellSize="0.2 0.5 0.1" labelCellData="100 200 300"/>

	<MeshTopology name="volume" points="@generator.outputPoints" 	tetras="@generator.outputTetras"/>
	<!--<VTKExporter name="exporter" filename="data/output.vtu"  XMLformat="1" edges="0" tetras="1"  listening="true" exportAtBegin="true" cellsDataFields="generator.outputCellData" overwrite="true"/>-->
</Node>
